// COMSOL Multiphysics 5.5.0.292 model "4_10_3d.mph"
// Outline of the model tree

Geometry
  geom1 "几何 1" (3D, length unit m)
    wp1: WorkPlane "工作平面 1" | unite = on
      pol1: Polygon "多边形 1" | source = table; table = {{0, 0}, {0.045, 0}, {0.045, 0.045}, {0, 0}}
    ext1: Extrude "拉伸 1" | workplane = wp1; input = wp1; distance = 0.01
    fin: Finalize "形成联合体"

Materials
  mat1: Common "材料 1" on all domains

Physics
  ht: HeatTransfer "固体传热" on all domains
    dependent variable T
    solid1: SolidHeatTransferModel "固体 1" (default) | k_mat = userdef; k = 50
    init1: init "初始值 1" (default)
    ins1: ThermalInsulation "热绝缘 1" (default)
    temp1: TemperatureBoundary "温度 1" on boundaries 5 | T0 = 373.15[K]
    hf1: HeatFluxBoundary "热通量 1" on boundaries 1-4 | HeatFluxType = ConvectiveHeatFlux; h = 50

Mesh
  mesh1 "网格 1"
    size: MeshSizeDefault "大小" | hmin = 0.00243; hauto = 8
    ftet3: FreeTet "自由四面体网格 3" on remaining entities

Studies
  std1 "研究 1"
    stat: Stationary "稳态"

Solver configurations
  sol1 "解 1" (study std1)
    v1: Variables "因变量 1"
    s1: Stationary "稳态求解器 1"
      fc1: FullyCoupled "全耦合 1" | linsolver = d1; initstep = 0.01; minstep = 1.0E-6; maxiter = 50
      d1: Direct "直接，传热变量 (ht)" | linsolver = pardiso; pivotperturb = 1.0E-13

Datasets
  dset1: Solution | solution = sol1

Plots
  pg1: PlotGroup3D "温度 (ht)" | data = dset1
    surf1: Surface "表面" | expr = T
  pg2: PlotGroup3D "等温线 (ht)" | data = dset1
    iso1: Isosurface "等值面" | expr = T; levelrounding = off