// COMSOL Multiphysics 5.5.0.292 model "4_23.mph"
// Outline of the model tree

Selections
  sel1: Explicit "显式 1" on no domains

Geometry
  geom1 "几何 1" (2D, length unit m)
    r1: Rectangle "矩形 1" | base = center; size = {3, 2.2}
    r2: Rectangle "矩形 2" | base = center; size = {2, 1.2}
    dif1: Difference "差集 1" | input = r1; input2 = r2
    fin: Finalize "形成联合体"

Materials
  mat1: Common "材料 1" on all domains
    def "基本"
      thermalconductivity = 200

Physics
  ht: HeatTransferInSolidsAndFluids "固体和流体传热" on all domains
    dependent variable T
    solid1: SolidHeatTransferModel "固体 1" (default) | k_mat = from_mat
    init1: init "初始值 1" (default)
    ins1: ThermalInsulation "热绝缘 1" (default)
    temp1: TemperatureBoundary "温度 1" on boundaries 1-3, 8 | T0 = 303.15[K]
    temp2: TemperatureBoundary "温度 2" on boundaries 4-7 | T0 = 283.15[K]

Mesh
  mesh1 "网格 1"
    size: MeshSizeDefault "大小" | hmin = 6.0E-5; hauto = 1
    fq1: FreeQuad "自由四边形网格 1" on remaining entities | smoothmaxiter = 80

Studies
  std1 "研究 1"
    stat: Stationary "稳态"

Solver configurations
  sol1 "解 1" (study std1)
    v1: Variables "因变量 1"
    s1: Stationary "稳态求解器 1" | stol = 0.0002
      fc1: FullyCoupled "全耦合 1" | linsolver = d1; initstep = 0.01; minstep = 1.0E-6; maxiter = 50
      d1: Direct "直接，传热变量 (ht)" | linsolver = pardiso; pivotperturb = 1.0E-13

Datasets
  dset1: Solution | solution = sol1

Plots
  pg1: PlotGroup2D "温度 (ht)" | data = dset1
    surf1: Surface "表面" | expr = T
  pg2: PlotGroup2D "等温线 (ht)" | data = dset1
    con1: Contour "等值线" | expr = T; levelrounding = off

Exports
  img1: Image "图像 1" | size = current; unit = px; width = 800; height = 600